<?xml version="1.0"?>
<!--

Based on tables from JavaProp.


 -->

<propeller name="Curtiss 714-1C2-12; 4 blade constant speed metal prop for P47">

	<!--
	<ixx> is the rotational moment of inertia for the propeller/engine combination.
	Small numbers accelerate faster but bounce around more. Large numbers
	accelerate slower and regulate smoother.

	 I = m*D^2/12

	 m=213kg
	 d=3.7....... use this value multiplied by 0.9 as the weight isn't evenly spread along the radius of the prop
	-->

	<ixx unit="SLUG*FT2"> 145 </ixx>

	<!--
	Prop Characteristics
	-->

	<diameter unit="IN">146 </diameter>
	<numblades> 4 </numblades>
	<constspeed> 1 </constspeed>

	<!--
	<gearratio> is the gearing between the prop and the engine,
	Normally it's defined from the engine to the propeller and is a value below zero
	ie 0.477
	To specify from the propeller to the engine use 1/X = gearration = 1/0.477 = 2.09
	-->

	<gearratio>2</gearratio>

	<!--
	<minpitch> is the Prop min AoA setting
	<maxpitch> is the Prop max AoA setting
	-->
	<minpitch>28</minpitch>
	<maxpitch>58</maxpitch>

	<!--
	Set the minrpm of the propeller to the props min rpm*engine to prop gearratio.
		1800*0.477 = 859
	This means the propeller will not try to slow the engine below that point.

	<maxrpm> is the Prop Govenors max setting
	-->
	<minrpm>400</minrpm>
	<maxrpm>1350</maxrpm>

	<!--
	<ct_factor> is the props co-efficent of thrust 'tuning' factor
	<cp_factor> is the props co-efficent of power 'tuning' factor
	-->
	<ct_factor> 1.0 </ct_factor>
	<cp_factor> 1.0 </cp_factor>

	<table name="C_THRUST" type="internal">
		<tableData>
				28		34		40		46		52		58
			0.0	0.1100	0.1136	0.1171	0.1184	0.1163	0.1103
			0.1	0.1126	0.1161	0.1131	0.1010	0.0814	0.0682
			0.2	0.1120	0.1170	0.1160	0.1063	0.0868	0.0706
			0.3	0.1109	0.1170	0.1180	0.1106	0.0922	0.0731
			0.4	0.1099	0.1162	0.1193	0.1143	0.0978	0.0765
			0.5	0.1092	0.1146	0.1195	0.1172	0.1037	0.0809
			0.6	0.1075	0.1129	0.1190	0.1189	0.1093	0.0863
			0.7	0.1042	0.1118	0.1181	0.1199	0.1131	0.0931
			0.8	0.0972	0.1124	0.1170	0.1205	0.1155	0.0996
			0.9	0.0842	0.1128	0.1156	0.1207	0.1177	0.1049
			1.0	0.0671	0.1094	0.1147	0.1205	0.1196	0.1084
			1.1	0.0491	0.1017	0.1175	0.1201	0.1212	0.1117
			1.2	0.0307	0.0885	0.1199	0.1196	0.1223	0.1150
			1.3	0.0118	0.0718	0.1163	0.1193	0.1232	0.1180
			1.4	-0.0070	0.0548	0.1100	0.1215	0.1237	0.1206
			1.5	-0.0280	0.0374	0.0990	0.1280	0.1242	0.1229
			1.6	-0.0480	0.0197	0.0845	0.1264	0.1246	0.1248
			1.7	-0.0680	0.0017	0.0689	0.1222	0.1253	0.1265
		</tableData>
	</table>

	<table name="C_POWER" type="internal">
		<tableData>
				28		34		40		46		52		58
			0.0	0.1040	0.1424	0.1872	0.2416	0.3056	0.3783
			0.1	0.1088	0.1524	0.2006	0.2291	0.2224	0.2216
			0.2	0.1081	0.1514	0.2026	0.2423	0.2389	0.2355
			0.3	0.1061	0.1491	0.2022	0.2514	0.2559	0.2494
			0.4	0.1038	0.1460	0.2000	0.2566	0.2747	0.2651
			0.5	0.1007	0.1429	0.1959	0.2580	0.2953	0.2830
			0.6	0.1000	0.1410	0.1906	0.2558	0.3118	0.3038
			0.7	0.0996	0.1390	0.1864	0.2501	0.3200	0.3284
			0.8	0.0983	0.1362	0.1835	0.2442	0.3203	0.3555
			0.9	0.0918	0.1357	0.1823	0.2396	0.3145	0.3820
			1.0	0.0796	0.1362	0.1825	0.2364	0.3090	0.3941
			1.1	0.0640	0.1337	0.1790	0.2347	0.3048	0.3916
			1.2	0.0452	0.1241	0.1813	0.2349	0.3020	0.3875
			1.3	0.0230	0.1080	0.1827	0.2372	0.3007	0.3846
			1.4	-0.0100	0.0889	0.1805	0.2379	0.3009	0.3831
			1.5	-0.0450	0.0667	0.1712	0.2393	0.3028	0.3829
			1.6	-0.0900	0.0414	0.1546	0.2437	0.3067	0.3842
			1.7	-0.1400	0.0127	0.1340	0.2439	0.3129	0.3868
		</tableData>
	</table>

	<!-- thrust effects of helical tip Mach -->
	<table name="CT_MACH" type="internal">
		<tableData>
			0.85   1.0
			1.05   0.8
		</tableData>
	</table>

	<!-- power-required effects of helical tip Mach -->
	<table name="CP_MACH" type="internal">
		<tableData>
			0.85   1.0
			1.05   1.8
		</tableData>
	</table>

</propeller>
