<?xml version="1.0"?>
<?xml-stylesheet type="text/xsl" href="http://jsbsim.sourceforge.net/JSBSim.xsl"?>

<fdm_config name="P47dJSBsim" version="2.0" release="ALPHA"
   xmlns:xsi="http://www.w3.org/2001/XMLSchema-instance"
   xsi:noNamespaceSchemaLocation="http://jsbsim.sourceforge.net/JSBSim.xsd">

 <fileheader>
	<author> Aeromatic v 3.3.0 </author>
	<filecreationdate> 18 Aug 2016 </filecreationdate>
	<version>$Revision: 2.1 $</version>
	<description>
		The Republic P-47 Thunderbolt was a World War II era fighter aircraft produced by the United States between 1941 and 1945.
		Its primary armament was eight .50-caliber machine guns and in the fighter-bomber ground-attack role it could carry five-inch rockets
		or a bomb load of 2,500 pounds (1,103 kg). When fully loaded the P-47 weighed up to eight tons (tonnes) making it one of the heaviest
		fighters of the war. The P-47 was designed around the powerful Pratt and Whitney R-2800 Double Wasp engine which was also used by two U.S.
		Navy fighters, the Grumman F6F Hellcat and the Vought F4U Corsair. The Thunderbolt was effective as a short-to-medium range escort fighter
		in high-altitude air-to-air combat and ground attack in both the World War II European and Pacific theaters.

		The P-47 was one of the main United States Army Air Forces (USAAF) fighters of World War II, and served with Allied air forces including France,
		Britain, and Russia. Mexican and Brazilian squadrons fighting alongside the U.S. were equipped with the P-47.
	</description>
 </fileheader>

<!--
  File:     P47dJSBsim.xml
  Inputs:
    name:          P47dJSBsim
    type:          WWII fighter, subsonic sport, aerobatic
    stall speed:   100.00kts
    max weight:    17500.00 lb
    length:        36.10 ft
    wing:
     span:         40.90 ft
     area:         300.00 sq-ft
     mean chord:   7.28 ft
     aspect ratio: 5.61:1
     taper ratio:  3.00:1
     incidence:    1.00 degrees
     dihedral:     4.00 degrees
     sweep:        3.00 degrees

    no. engines:   1
    engine type:   Piston Engine
    engine layout: forward fuselage

    gear type:     taildragger
    steering type: steering
    retractable?:  yes

  Outputs:
    wing loading:  58.33 lb/sq-ft
    payload:       5365.00 lbs
    CL-alpha:      4.75 per radian
    CL-0:          0.38
    CL-max:        1.72
    CD-0:          0.02
    K:             0.06
    Mcrit:         0.75

-->

	<metrics>
		<wingarea  unit="FT2">   300.00 </wingarea>
		<wingspan  unit="FT" >    40.90 </wingspan>
		<wing_incidence>           1.00 </wing_incidence>
		<chord     unit="FT" >    9.166 </chord>
		<htailarea unit="FT2">    51.00 </htailarea>
		<htailarm  unit="FT" >    21.66 </htailarm>
		<vtailarea  unit="FT2">   30.00 </vtailarea>
		<vtailarm  unit="FT" >    21.66 </vtailarm>
		<location name="AERORP" unit="M">
			<x> -1.28 </x>
			<z> -0.10 </z>
		</location>
		<location name="EYEPOINT" unit="M">
			<x> 0.17 </x>
			<z> 1.02 </z>
		</location>
	</metrics>

	<mass_balance>
		<ixx unit="SLUG*FT2"> 12533 </ixx>
		<iyy unit="SLUG*FT2"> 19034 </iyy>
		<izz unit="SLUG*FT2"> 30444 </izz>
		<emptywt unit="LBS" > 11173 </emptywt>
		<location name="CG" unit="M">
			<x> -1.14 </x>
			<z> -0.28 </z>
		</location>

	<!-- #### UNDERCARRIAGE #### -->
	<!-- #### Left #### -->
		<pointmass name="left"> <!-- 0 -->
			<weight unit="LBS"> 282 </weight>
            <location name="POINTMASS" unit="M">
            </location>
        </pointmass>

	<!-- #### Right #### -->
		<pointmass name="right"> <!-- 1 -->
            <weight unit="LBS"> 282 </weight>
            <location name="POINTMASS" unit="M">
            </location>
        </pointmass>

	</mass_balance>

	<propulsion>

	<engine file="R-2800-21">
		<location unit="M">
			<x> -3.41 </x>
		</location>
		<feed> 0 </feed>
		<thruster file="Curtiss 714-1C2-12">
			<sense> 1 </sense>
			<location unit="M">
				<x> -4.35 </x>
			</location>
		</thruster>
	</engine>

	<tank type="FUEL" number="0"> <!--  FUEL SELECTOR SWITCH' -->
		<location unit="M">
			<x> -1.5 </x>
			<z> -1.07 </z>
		</location>
		<capacity unit="LBS"> 0.25 </capacity>
		<contents unit="LBS"> 0 </contents>
	</tank>

	<tank type="FUEL" number="1"> <!--  MAIN 'RESERVE' -->
		<location unit="M">
			<x> -1.45 </x>
			<z> -1.07 </z>
		</location>
		<radius unit="M"> 0.5 </radius>
		<drain_location unit="M">
			<x> -1.5 </x>
			<z> -0.57 </z>
		</drain_location>
		<capacity unit="LBS"> 240 </capacity>
		<contents unit="LBS"> 240 </contents>
	</tank>

	<tank type="FUEL" number="2"> <!--  MAIN  -->
		<location unit="M">
			<x> -1.25 </x>
			<z> -0.57 </z>
		</location>
		<radius unit="M"> 0.5 </radius>
		<drain_location unit="M">
			<x> -1.35 </x>
			<z> -0.40 </z>
		</drain_location>
		<capacity unit="LBS"> 992 </capacity>
		<contents unit="LBS"> 992 </contents>
	</tank>

	<tank type="FUEL" number="3"> <!--  AUXILIARY -->
		<location unit="M">
			<z> -0.57 </z>
		</location>
		<radius unit="M"> 0.5 </radius>
		<drain_location unit="M">
			<x> -0.35 </x>
			<z> -0.40 </z>
		</drain_location>
		<capacity unit="LBS"> 602 </capacity>
		<contents unit="LBS"> 602 </contents>
	</tank>

	<tank type="FUEL" number="4"> <!--  BELLY DROP-TANK -->
		<location unit="M">
			<x> -1.75 </x>
			<z> -1.9 </z>
		</location>
		<radius unit="M"> 0.3 </radius>
		<drain_location unit="M">
			<x> -1.75 </x>
			<z> -2.15 </z>
		</drain_location>
		<capacity unit="LBS"> 452 </capacity>
		<contents unit="LBS"> 0 </contents>
	</tank>

	<tank type="FUEL" number="5"> <!-- OIL -->
		<location unit="M">
			<x> -2.33 </x>
			<z> 0.40 </z>
		</location>
		<radius unit="M"> 0.3 </radius>
		<drain_location unit="M">
			<x> -2.33 </x>
			<z> -0.1 </z>
		</drain_location>
		<capacity unit="LBS"> 203 </capacity>
		<contents unit="LBS"> 136 </contents>
	</tank>

 </propulsion>

 <ground_reactions>

	<contact type="BOGEY" name="LEFT_MAIN">
		<location unit="M">
			<x> -1.7 </x>
			<y> -2.4 </y>
			<z> -2.45 </z>
		</location>
		<static_friction>  0.80 </static_friction>
		<dynamic_friction> 0.05 </dynamic_friction>
		<rolling_friction> 0.01 </rolling_friction>
		<spring_coeff unit="LBS/FT"> 105000 </spring_coeff> <!--  weight * 6 -->
		<damping_coeff unit="LBS/FT/SEC"> 12000 </damping_coeff> <!--  spring_coeff * 0.115 -->
		<damping_coeff_rebound unit="LBS/FT/SEC"> 6000 </damping_coeff_rebound> <!--  damping_coeff * 0.5 -->
		<brake_group>LEFT</brake_group>
		<retractable>1</retractable>
	</contact>

	<contact type="BOGEY" name="RIGHT_MAIN">
		<location unit="M">
			<x> -1.7 </x>
			<y> 2.4 </y>
			<z> -2.45 </z>
		</location>
		<static_friction>  0.80 </static_friction>
		<dynamic_friction> 0.05 </dynamic_friction>
		<rolling_friction> 0.05 </rolling_friction>
		<spring_coeff unit="LBS/FT"> 105000 </spring_coeff> <!--  weight * 6 -->
		<damping_coeff unit="LBS/FT/SEC"> 12000 </damping_coeff> <!--  spring_coeff * 0.115 -->
		<damping_coeff_rebound unit="LBS/FT/SEC"> 6000 </damping_coeff_rebound> <!--  damping_coeff * 0.5 -->
		<brake_group>RIGHT</brake_group>
		<retractable>1</retractable>
	</contact>

	<contact type="BOGEY" name="TAIL">
		<location unit="M">
			<x> 5 </x>
			<z> -1.01 </z>
		</location>
		<static_friction>  0.80 </static_friction>
		<dynamic_friction> 0.05 </dynamic_friction>
		<rolling_friction> 0.05 </rolling_friction>
		<spring_coeff unit="LBS/FT"> 10500 </spring_coeff> <!--  weight * 0.6 -->
		<damping_coeff unit="LBS/FT/SEC"> 1050 </damping_coeff> <!--  spring_coeff * 0.1 -->
		<damping_coeff_rebound unit="LBS/FT/SEC"> 262 </damping_coeff_rebound> <!--  damping_coeff * 0.25 -->
		<max_steer unit="DEG"> -30 </max_steer>
		<brake_group>NONE</brake_group>
		<retractable>1</retractable>
	</contact>

<!-- HIGH LEVEL JACKS (for use in wind tunnel)


	<contact type="BOGEY" name="LEFT_MAIN2">
		<location unit="M">
			<x> -1.7 </x>
			<y> -2.4 </y>
			<z> -3.45 </z>
		</location>
		<static_friction>  0.80 </static_friction>
		<dynamic_friction> 0.05 </dynamic_friction>
		<rolling_friction> 0.01 </rolling_friction>
		<spring_coeff unit="LBS/FT"> 105000 </spring_coeff>
		<damping_coeff unit="LBS/FT/SEC"> 12000 </damping_coeff>
		<damping_coeff_rebound unit="LBS/FT/SEC"> 6000 </damping_coeff_rebound>
		<brake_group>LEFT</brake_group>
		<retractable>0</retractable>
	</contact>

	<contact type="BOGEY" name="RIGHT_MAIN2">
		<location unit="M">
			<x> -1.7 </x>
			<y> 2.4 </y>
			<z> -3.45 </z>
		</location>
		<static_friction>  0.80 </static_friction>
		<dynamic_friction> 0.05 </dynamic_friction>
		<rolling_friction> 0.05 </rolling_friction>
		<spring_coeff unit="LBS/FT"> 105000 </spring_coeff>
		<damping_coeff unit="LBS/FT/SEC"> 12000 </damping_coeff>
		<damping_coeff_rebound unit="LBS/FT/SEC"> 6000 </damping_coeff_rebound>
		<brake_group>RIGHT</brake_group>
		<retractable>0</retractable>
	</contact>

	<contact type="BOGEY" name="TAIL2">
		<location unit="M">
			<x> 5 </x>
			<z> -3.45 </z>
		</location>
		<static_friction>  0.80 </static_friction>
		<dynamic_friction> 0.05 </dynamic_friction>
		<rolling_friction> 0.05 </rolling_friction>
		<spring_coeff unit="LBS/FT"> 10500 </spring_coeff>
		<damping_coeff unit="LBS/FT/SEC"> 1050 </damping_coeff>
		<damping_coeff_rebound unit="LBS/FT/SEC"> 262 </damping_coeff_rebound>
		<max_steer unit="DEG"> -30 </max_steer>
		<brake_group>NONE</brake_group>
		<retractable>0</retractable>
	</contact>

 -->

  <contact type="STRUCTURE" name="LEFT_WING">
    <location unit="M">
		<x> -1.3 </x>
		<y> -6.9 </y>
		<z> -0.1 </z>
    </location>
   <static_friction>  5 </static_friction>
   <dynamic_friction> 4 </dynamic_friction>
      <spring_coeff unit="LBS/FT"> 10000 </spring_coeff>
      <damping_coeff unit="LBS/FT/SEC"> 2000 </damping_coeff>
      <damping_coeff_rebound unit="LBS/FT/SEC"> 400 </damping_coeff_rebound>
  </contact>

  <contact type="STRUCTURE" name="RIGHT_WING">
    <location unit="M">
		<x> -1.3 </x>
		<y> 6.9 </y>
		<z> -0.1 </z>
    </location>
   <static_friction>  5 </static_friction>
   <dynamic_friction> 4 </dynamic_friction>
      <spring_coeff unit="LBS/FT"> 10000 </spring_coeff>
      <damping_coeff unit="LBS/FT/SEC"> 2000 </damping_coeff>
      <damping_coeff_rebound unit="LBS/FT/SEC"> 400 </damping_coeff_rebound>
  </contact>

 <contact type="STRUCTURE" name="PROPLOWER">
    <location unit="M">
     <x> -4.35 </x>
     <z> -1.9 </z>
    </location>
    <static_friction>  8 </static_friction>
    <dynamic_friction> 7 </dynamic_friction>
      <spring_coeff unit="LBS/FT"> 1000 </spring_coeff>
      <damping_coeff unit="LBS/FT/SEC"> 2000 </damping_coeff>
      <damping_coeff_rebound unit="LBS/FT/SEC"> 400 </damping_coeff_rebound>
 </contact>

	 <contact type="STRUCTURE" name="NOSEUPPER">
		<location unit="M">
			 <x>  -2.75 </x>
			 <z> 0.83 </z>
		</location>
		<static_friction>  8 </static_friction>
		<dynamic_friction> 7 </dynamic_friction>
		<spring_coeff unit="LBS/FT"> 70000 </spring_coeff> <!--  weight * 4 -->
		<damping_coeff unit="LBS/FT/SEC"> 2100 </damping_coeff> <!--  spring_coeff * 0.03 -->
		<damping_coeff_rebound unit="LBS/FT/SEC"> 420 </damping_coeff_rebound> <!--  damping_coeff * 2 -->
	</contact>

	<contact type="STRUCTURE" name="NOSELOWER">
		<location unit="M">
			 <x>  -2.75 </x>
			 <z> -1.3 </z>
		</location>
		<static_friction>  8 </static_friction>
		<dynamic_friction> 7 </dynamic_friction>
		<spring_coeff unit="LBS/FT"> 70000 </spring_coeff> <!--  weight * 4 -->
		<damping_coeff unit="LBS/FT/SEC"> 2100 </damping_coeff> <!--  spring_coeff * 0.03 -->
		<damping_coeff_rebound unit="LBS/FT/SEC"> 420 </damping_coeff_rebound> <!--  damping_coeff * 2 -->
	</contact>

	<contact type="STRUCTURE" name="UPPERVSTAB">
		<location unit="M">
			 <x>  5.51074</x>
			 <z> 2.09533 </z>
		</location>
		<static_friction>  5 </static_friction>
		<dynamic_friction> 4 </dynamic_friction>
		<spring_coeff unit="LBS/FT"> 70000 </spring_coeff> <!--  weight * 4 -->
		<damping_coeff unit="LBS/FT/SEC"> 2100 </damping_coeff> <!--  spring_coeff * 0.03 -->
		<damping_coeff_rebound unit="LBS/FT/SEC"> 420 </damping_coeff_rebound> <!--  damping_coeff * 2 -->
	</contact>

  <contact type="STRUCTURE" name="LOWERVSTAB">
    <location unit="M">
     <x>  5.91695</x>
     <z> -0.16759 </z>
    </location>
    <static_friction>  5 </static_friction>
    <dynamic_friction> 4 </dynamic_friction>
      <spring_coeff unit="LBS/FT"> 1000 </spring_coeff>
      <damping_coeff unit="LBS/FT/SEC"> 2000 </damping_coeff>
      <damping_coeff_rebound unit="LBS/FT/SEC"> 400 </damping_coeff_rebound>
 </contact>

  <contact type="STRUCTURE" name="FUSELAGELOW">
    <location unit="M">
     <x>  1.13667</x>
     <z> -0.95272 </z>
    </location>
    <static_friction>  8 </static_friction>
    <dynamic_friction> 7 </dynamic_friction>
      <spring_coeff unit="LBS/FT"> 1000 </spring_coeff>
      <damping_coeff unit="LBS/FT/SEC"> 2000 </damping_coeff>
      <damping_coeff_rebound unit="LBS/FT/SEC"> 400 </damping_coeff_rebound>
 </contact>

  <contact type="STRUCTURE" name="INTAKE">
    <location unit="M">
     <x> 3.21260</x>
     <z> -0.87958 </z>
    </location>
    <static_friction>  8 </static_friction>
    <dynamic_friction> 7 </dynamic_friction>
      <spring_coeff unit="LBS/FT"> 1000 </spring_coeff>
      <damping_coeff unit="LBS/FT/SEC"> 2000 </damping_coeff>
      <damping_coeff_rebound unit="LBS/FT/SEC"> 400 </damping_coeff_rebound>
 </contact>

  <contact type="STRUCTURE" name="CANOPY">
    <location unit="M">
     <x>  0.04797</x>
     <z> 1.16144 </z>
    </location>
    <static_friction>  5 </static_friction>
    <dynamic_friction> 4 </dynamic_friction>
      <spring_coeff unit="LBS/FT"> 1000 </spring_coeff>
      <damping_coeff unit="LBS/FT/SEC"> 2000 </damping_coeff>
      <damping_coeff_rebound unit="LBS/FT/SEC"> 400 </damping_coeff_rebound>
 </contact>

 </ground_reactions>

	<system file="Conventional Controls"/>

	<system file="engine"/>
	<system file="EHVP"/>
	<system file="hydraulic-equipment"/>

	<system file="jsb-misc"/>

	<!--
	<system file="crash-detect"/>
	<system file="automixture"/>
	-->

 <flight_control name="FCS: P47dJSBsim">

 </flight_control>

 <aerodynamics>

 	<function name="aero/qbar-Sw-lbs">
	<description>dynamic force</description>
		<product>
			<property>aero/qbar-psf</property>
			<property>metrics/Sw-sqft</property>
		</product>
	</function>

<!-- LIFT -->

	<function name="aero/force/Lift_propwash">
	<description>Delta lift due to propeller induced velocity</description>
		<product>
			<property>propulsion/engine[0]/thrust-coefficient</property>
			<property>aero/qbar-Sw-lbs</property>
			<table>
				<independentVar lookup="row">aero/alpha-rad</independentVar>
				<independentVar lookup="column">fcs/flap-pos-deg</independentVar>
				<tableData>
							0.0		60.0
					-0.18	0.000	0.000
					0.00	0.004	0.044
					0.30	0.031	0.060
					0.61	0.040	0.050
				</tableData>
			</table>
		</product>
	</function>

	<function name="aero/force/Lift_alpha">
	<description>Lift due to alpha</description>
		<product>
			<property>aero/qbar-Sw-lbs</property>
			<property>aero/lift-factor</property>
			<table>
				<independentVar lookup="row">aero/alpha-deg</independentVar>
					<tableData>
					-11.46	-0.5650
					0.00	0.2000
					7.50	0.7500
					11.00	1.1500
					16.04	1.4230
					22.91	1.2000
					34.38	0.7000
					</tableData>
			</table>
		</product>
	</function>

	<function name="aero/force/Lift_pitch_rate">
	<description>Lift due to pitch rate</description>
		<product>
			<property>aero/qbar-Sw-lbs</property>
			<property>velocities/q-aero-rad_sec</property>
			<property>aero/ci2vel</property>
			<value> 4.5 </value>
		</product>
	</function>

	<function name="aero/force/Lift_alpha_rate">
	<description>Lift due to alpha rate</description>
		<product>
			<property>aero/qbar-Sw-lbs</property>
			<property>aero/alphadot-rad_sec</property>
			<property>aero/ci2vel</property>
			<value> 2.30 </value>
		</product>
	</function>

	<function name="aero/force/Lift_elevator">
	<description>Lift due to Elevator Deflection</description>
		<product>
			<property>aero/qbar-Sw-lbs</property>
			<property>fcs/elevator-pos-rad</property>
			<value> 0.4503 </value>
		</product>
	</function>

	<function name="aero/force/Lift_flap">
	<description>Delta Lift due to flaps</description>
		<product>
			<property>aero/qbar-Sw-lbs</property>
			<property>fcs/flap-pos-deg</property>
			<value> 0.025 </value>
		</product>
	</function>

	<function name="aero/force/LIFT">
		<sum>
<!--			<property>aero/force/Lift_propwash</property> -->
			<property>aero/force/Lift_alpha</property>
			<property>aero/force/Lift_pitch_rate</property>
			<property>aero/force/Lift_alpha_rate</property>
			<property>aero/force/Lift_elevator</property>
			<property>aero/force/Lift_flap</property>
		</sum>
	</function>

	<function name="aero/coefficient/Cl">
		<description>Cl</description>
		<quotient>
			<property>aero/force/LIFT</property>
			<property>aero/qbar-Sw-lbs</property>
		</quotient>
	</function>


<!-- DRAG -->


	<function name="aero/force/Drag_basic">
	<description>Drag at zero lift</description>
		<product>
			<property>aero/qbar-Sw-lbs</property>
			<property>aero/drag-factor</property>
			<table>
				<independentVar lookup="row">aero/alpha-rad</independentVar>
				<tableData>
				-1.57	1.500
				-0.26	0.026
				0.00	0.021
				0.26	0.036
				1.57	1.500
				</tableData>
			</table>
		</product>
	</function>

	<function name="aero/force/Drag_induced">
	<description>Induced drag</description>
		<product>
			<property>aero/qbar-Sw-lbs</property>
			<property>aero/coefficient/Cl</property>
			<property>aero/coefficient/Cl</property>
			<value> 0.06 </value> <!-- 1 over efficiency value * pi * apect ratio -->
		</product>
	</function>

	<function name="aero/force/Drag_mach">
	<description>Drag due to mach</description>
		<product>
			<property>aero/qbar-Sw-lbs</property>
			<table>
				<independentVar lookup="row">velocities/mach</independentVar>
				<tableData>
				0.00	0.000
				0.25	0.005
				0.69	0.015
				1.10	0.045
				1.80	0.080
				</tableData>
			</table>
		</product>
	</function>

	<function name="aero/force/Drag_beta">
	<description>Drag due to sideslip</description>
		<product>
			<property>aero/qbar-Sw-lbs</property>
			<table>
				<independentVar lookup="row">aero/beta-rad</independentVar>
				<tableData>
				-1.57	1.230
				-0.26	0.050
				0.00	0.000
				0.26	0.050
				1.57	1.230
				</tableData>
			</table>
		</product>
	</function>

	<function name="aero/force/Drag_elevator">
	<description>Drag due to Elevator Deflection</description>
		<product>
			<property>aero/qbar-Sw-lbs</property>
			<abs><property>fcs/elevator-pos-rad</property></abs>
			<value> 0.0800 </value>
		</product>
	</function>

	<function name="aero/force/Drag_gear">
	<description>Drag due to gear</description>
		<sum>
			<product name="gear/unit[0]/drag-lbs">
				<property>aero/qbar-Sw-lbs</property>
					<table>
						<independentVar>gear/unit[0]/pos-norm</independentVar>
						<tableData>
							0      	0
							0.9		1
						</tableData>
					</table>
				<value> 0.01 </value> <!-- 0.02 -->
			</product>
			<product name="gear/unit[1]/drag-lbs">
				<property>aero/qbar-Sw-lbs</property>
					<table>
						<independentVar>gear/unit[1]/pos-norm</independentVar>
						<tableData>
							0      	0
							0.9		1
						</tableData>
					</table>
				<value> 0.01 </value> <!-- 0.02 -->
			</product>
		</sum>
	</function>

	<function name="aero/force/Drag_flap">
	<description>Drag due to flaps</description>
		<sum>
			<product name="flap/wing_left/drag-lbs">
				<property>aero/qbar-Sw-lbs</property>
				<property>flap/wing_left/pos-deg</property>
				<value> 0.00475 </value> <!-- 0.0095 -->
			</product>
			<product name="flap/wing_right/drag-lbs">
				<property>aero/qbar-Sw-lbs</property>
				<property>flap/wing_right/pos-deg</property>
				<value> 0.00475 </value> <!-- 0.0095 -->
			</product>
		</sum>
	</function>

	<function name="aero/force/DRAG">
		<sum>
			<property>aero/force/Drag_basic</property>
			<property>aero/force/Drag_induced</property>
			<property>aero/force/Drag_mach</property>
			<property>aero/force/Drag_beta</property>
			<property>aero/force/Drag_elevator</property>
 			<property>aero/force/Drag_gear</property>
			<property>aero/force/Drag_flap</property>
		</sum>
	</function>

    <function name="aero/force/LIFT2DRAG">
         <quotient>
           <property>aero/force/LIFT</property>
           <property>aero/force/DRAG</property>
         </quotient>
    </function>

<!-- SIDE -->

	<function name="aero/force/Side_beta">
	<description>Side force due to beta</description>
		<product>
			<property>aero/qbar-Sw-lbs</property>
			<property>aero/beta-rad</property>
			<value> -1 </value>
		</product>
	</function>

	<function name="aero/force/Side_roll_rate">
	<description>Side force due to roll rate</description>
		<product>
			<property>aero/qbar-Sw-lbs</property>
			<property>aero/bi2vel</property>
			<property>velocities/p-aero-rad_sec</property>
			<table>
				<independentVar lookup="row">aero/Re</independentVar>
				<tableData>
				7829911		0.6213
				8612902		0.0546
				11744868	0.0242
				15529454	0.0139
				</tableData>
			</table>
		</product>
	</function>

	<function name="aero/force/Side_yaw_rate">
	<description>Side force due to yaw rate</description>
		<product>
			<property>aero/qbar-Sw-lbs</property>
			<property>aero/bi2vel</property>
			<property>velocities/r-aero-rad_sec</property>
			<value> 0.2446 </value>
		</product>
	</function>

	<function name="aero/force/Side_rudder">
	<description>Side force due to rudder</description>
		<product>
			<property>aero/qbar-Sw-lbs</property>
			<property>fcs/rudder-pos-rad</property>
			<value> 0.002 </value>
			<value> 0.005 </value>
		</product>
	</function>

	<function name="aero/force/SIDE">
		<sum>
			<property>aero/force/Side_beta</property>
			<property>aero/force/Side_roll_rate</property>
			<property>aero/force/Side_yaw_rate</property>
			<property>aero/force/Side_rudder</property>
		</sum>
	</function>


<!-- PITCH -->

   <function name="aero/moment/Pitch_propwash">
      <description>Pitch moment due to propeller induced velocity</description>
      <product>
          <property>propulsion/engine[0]/thrust-coefficient</property>
			<property>aero/qbar-Sw-lbs</property>
          <property>metrics/bw-ft</property>
          <table>
            <independentVar lookup="row">aero/alpha-rad</independentVar>
            <independentVar lookup="column">fcs/flap-pos-deg</independentVar>
            <independentVar lookup="table">fcs/elevator-pos-rad</independentVar>
            <tableData breakPoint="-0.35">
                     0.0     60.0
              -0.01  0.000   0.000
               0.00  0.047  -0.043
               0.30 -0.062  -0.296
               0.40  0.000   0.000
            </tableData>
            <tableData breakPoint="0.0">
                     0.0     60.0
              -0.01  0.000   0.000
               0.00 -0.027  -0.073
               0.30 -0.122  -0.326
               0.40  0.000   0.000
            </tableData>
            <tableData breakPoint="0.35">
                     0.0     60.0
              -0.01  0.000   0.000
               0.00 -0.087  -0.103
               0.30 -0.182  -0.356
               0.40  0.000   0.000
            </tableData>
          </table>
      </product>
    </function>

    <function name="aero/moment/Pitch_alpha">
       <description>Pitch moment due to alpha</description>
       <product>
			<property>aero/qbar-Sw-lbs</property>
           <property>metrics/cbarw-ft</property>
           <property>aero/alpha-rad</property>
           <value> -1.007 </value>
       </product>
    </function>

    <function name="aero/moment/Pitch_elevator">
       <description>Pitch moment due to elevator</description>
       <product>
			<property>aero/qbar-Sw-lbs</property>
          <property>metrics/cbarw-ft</property>
          <property>fcs/elevator-pos-rad</property>
          <table>
            <independentVar lookup="row">velocities/mach</independentVar>
            <tableData>
              0.0    -1.3258
              2.0    -0.3315
            </tableData>
          </table>
       </product>
    </function>

    <function name="aero/moment/Pitch_damp">
       <description>Pitch moment due to pitch rate</description>
       <product>
			<property>aero/qbar-Sw-lbs</property>
           <property>metrics/cbarw-ft</property>
           <property>aero/ci2vel</property>
           <property>velocities/q-aero-rad_sec</property>
           <value> -12.7143 </value>
       </product>
    </function>

    <function name="aero/moment/Pitch_alphadot">
       <description>Pitch moment due to alpha rate</description>
       <product>
			<property>aero/qbar-Sw-lbs</property>
           <property>metrics/cbarw-ft</property>
           <property>aero/ci2vel</property>
           <property>aero/alphadot-rad_sec</property>
           <value> -6.6829 </value>
       </product>
    </function>

	<function name="aero/moment/PITCH">
		<sum>
<!--			<property>aero/moment/Pitch_propwash</property> -->
			<property>aero/moment/Pitch_alpha</property>
			<property>aero/moment/Pitch_elevator</property>
			<property>aero/moment/Pitch_damp</property>
			<property>aero/moment/Pitch_alphadot</property>
		</sum>
	</function>


<!-- ROLL -->

    <function name="aero/moment/Roll_differential_propwash">
       <description>Roll moment due to differential propwash</description>
       <product>
           <property>propulsion/engine[0]/thrust-coefficient</property>
			<property>aero/qbar-Sw-lbs</property>
           <property>metrics/bw-ft</property>
           <property>aero/alpha-rad</property>
           <value> 0.007 </value>
       </product>
    </function>

    <function name="aero/moment/Roll_beta">
       <description>Roll moment due to beta</description>
       <product>
			<property>aero/qbar-Sw-lbs</property>
           <property>metrics/bw-ft</property>
           <property>aero/beta-rad</property>
          <value>-0.10</value>
       </product>
    </function>

    <function name="aero/moment/Roll_damp">
       <description>Roll moment due to roll rate</description>
       <product>
			<property>aero/qbar-Sw-lbs</property>
           <property>metrics/bw-ft</property>
           <property>aero/bi2vel</property>
           <property>velocities/p-aero-rad_sec</property>
           <value> -0.8587 </value>
       </product>
    </function>

    <function name="aero/moment/Roll_yaw">
       <description>Roll moment due to yaw rate</description>
       <product>
			<property>aero/qbar-Sw-lbs</property>
           <property>metrics/bw-ft</property>
           <property>aero/bi2vel</property>
           <property>velocities/r-aero-rad_sec</property>
           <table>
             <independentVar lookup="row">aero/alpha-rad</independentVar>
             <independentVar lookup="column">aero/Re</independentVar>
             <tableData>
                          7829911  8612902 11744868 15529454
                 -0.0349   0.5144   0.0855   0.0626   0.0547
                  0.3491   4.7672   0.5413   0.5183   0.5105
             </tableData>
           </table>
       </product>
    </function>

    <function name="aero/moment/Roll_aileron">
       <description>Roll moment due to aileron</description>
       <product>
			<property>aero/qbar-Sw-lbs</property>
          <property>metrics/bw-ft</property>
          <property>fcs/left-aileron-pos-rad</property>
           <table>
            <independentVar lookup="row">velocities/mach</independentVar>
            <tableData>
              0.0    0.2600
              2.0    0.0750
            </tableData>
          </table>
       </product>
    </function>

    <function name="aero/moment/Roll_rudder">
       <description>Roll moment due to rudder</description>
       <product>
			<property>aero/qbar-Sw-lbs</property>
           <property>metrics/bw-ft</property>
           <property>fcs/rudder-pos-rad</property>
           <value> 0.0100 </value>
       </product>
    </function>

	<function name="aero/moment/ROLL">
		<sum>
<!--			<property>aero/moment/Roll_differential_propwash</property>	 -->
			<property>aero/moment/Roll_beta</property>
			<property>aero/moment/Roll_damp</property>
			<property>aero/moment/Roll_yaw</property>
			<property>aero/moment/Roll_aileron</property>
			<property>aero/moment/Roll_rudder</property>
		</sum>
	</function>


<!-- YAW -->

    <!-- Stall initiator -->
    <function name="aero/moment/Yaw_alpha">
       <description>Yaw moment due to alpha</description>
       <product>
			<property>aero/qbar-Sw-lbs</property>
           <property>metrics/bw-ft</property>
           <property>aero/alpha-rad</property>
           <table>
             <independentVar lookup="row">aero/beta-rad</independentVar>
             <independentVar lookup="column">aero/Re</independentVar>
             <tableData>
                          7829911  8612902
                 -0.25  -0.5  0.0000
                  0.25   0.5   0.0000
             </tableData>
           </table>
       </product>
    </function>

    <function name="aero/moment/Yaw_beta">
       <description>Yaw moment due to beta</description>
       <product>
			<property>aero/qbar-Sw-lbs</property>
           <property>metrics/bw-ft</property>
           <property>aero/beta-rad</property>
           <value> 0.12 </value>
       </product>
    </function>

    <function name="aero/moment/Yaw_roll_rate">
       <description>Yaw moment due to roll rate</description>
       <product>
			<property>aero/qbar-Sw-lbs</property>
           <property>metrics/bw-ft</property>
           <property>aero/bi2vel</property>
           <property>velocities/p-rad_sec</property>
           <table>
             <independentVar lookup="row">aero/Re</independentVar>
             <tableData>
                 7829911  -2.1538
                 8612902  -0.1891
                11744868  -0.0840
                15529454  -0.0481
             </tableData>
           </table>
       </product>
    </function>

    <function name="aero/moment/Yaw_damp">
       <description>Yaw moment due to yaw rate</description>
       <product>
			<property>aero/qbar-Sw-lbs</property>
           <property>metrics/bw-ft</property>
           <property>aero/bi2vel</property>
           <property>velocities/r-aero-rad_sec</property>
           <value> -0.1407 </value>
       </product>
    </function>

    <function name="aero/moment/Yaw_rudder">
       <description>Yaw moment due to rudder</description>
       <product>
			<property>aero/qbar-Sw-lbs</property>
           <property>metrics/bw-ft</property>
           <property>fcs/rudder-pos-rad</property>
           <value> -0.0745 </value>
       </product>
    </function>

    <function name="aero/moment/Yaw_aileron">
       <description>Adverse yaw</description>
       <product>
			<property>aero/qbar-Sw-lbs</property>
           <property>metrics/bw-ft</property>
           <property>fcs/left-aileron-pos-rad</property>
           <value> -0.0030 </value>
       </product>
    </function>

	<function name="aero/moment/YAW">
		<sum>
			<property>aero/moment/Yaw_alpha</property>
			<property>aero/moment/Yaw_beta</property>
			<property>aero/moment/Yaw_roll_rate</property>
			<property>aero/moment/Yaw_damp</property>
			<property>aero/moment/Yaw_rudder</property>
			<property>aero/moment/Yaw_aileron</property>
		</sum>
	</function>

 	<axis name="LIFT">

    <function>
		<property>aero/force/LIFT</property>
    </function>

	</axis>

	<axis name="DRAG">

    <function>
		<property>aero/force/DRAG</property>
    </function>

	</axis>

	<axis name="SIDE">

    <function>
		<property>aero/force/SIDE</property>
    </function>

	</axis>

	<axis name="PITCH">

    <function>
		<property>aero/moment/PITCH</property>
    </function>

	</axis>

	<axis name="ROLL">

    <function>
		<property>aero/moment/ROLL</property>
    </function>

	</axis>

	<axis name="YAW">

    <function>
		<property>aero/moment/YAW</property>
    </function>

	</axis>

 </aerodynamics>

</fdm_config>
